f(x) := x^4 - 4*x - 1
d/dx(f(x)) → 4*x^3 - 4
phi(x) := (x - f(x)/(d/dx(f(x))))
eps := [0.01; 0.001; 0.0001; 0.00001; 0.000001]
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# Метод отделения корня
# Метод деления пополам
# Метод итераций
# Комбинированный метод
сombination(a, b, e) :=
    n ← 0
    while a - b > e
        x ← (a + b)/2
        n ← n + 1
        break if |f(x)| < |f(a)| and |f(x)| < |f(b)|
        b ← x if f(a)*f(x) ≤ 0
        a ← x otherwise
        1
    while |b - a| > e
        a ← phi(b)
        b ← phi(a)
        n ← n + 1
    n + 1
bisection(a, b, e) :=
    n ← 0
    while b - a > e
        n ← n + 1
        c ← (a + b)/2
        b ← c if f(a)*f(c) < 0
        a ← c otherwise
    return n
iteration(x0, e) :=
    n ← 0
    x ← x0
    x1 ← phi(x)
    while |x1 - x| ≥ e
        x ← x1
        x1 ← phi(x)
        n ← n + 1
    return n + 1
rootSeparation(x0, x1, deltax) := conj({
    m ← 0
    matrix[0] ← ["m", "a", "b"]
    x ← x0
    y0 ← f(x)
    x ← x + deltax
    while x ≤ x1
        y1 ← f(x)
        if y0*y1 ≤ 0
            m ← m + 1
            matrix[m] ← [m, (x - deltax), x]
        y0 ← y1
        x ← x + deltax
        y1 ← f(x)
    return matrix
})
# Интервал -10
bisectionRoot1 := [
    bisection(-10, 10, 0.01);
    bisection(-10, 10, 0.001);
    bisection(-10, 10, 0.0001);
    bisection(-10, 10, 0.00001);
    bisection(-10, 10, 0.00001)
] = [11; 15; 18; 21; 21]  # Итервал поиска (-10 ... 10)
iterationRoot1 := [
    iteration(-10, 0.01);
    iteration(-10, 0.001);
    iteration(-10, 0.0001);
    iteration(-10, 0.00001);
    iteration(-10, 0.000001)
] = [11; 11; 11; 12; 12]
combinationRoot1 := [
    сombination(-10, 10, 0.01);
    сombination(-10, 10, 0.001);
    сombination(-10, 10, 0.0001);
    сombination(-10, 10, 0.00001);
    сombination(-10, 10, 0.000001)
] = [6; 6; 7; 7; 7]  # Интервал поиска (-10 ... 10)
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# Интервалы существования
# корня
rootSeparation(-10, 10, 0.5) = [["m", "a", "b"]; [1, -0.5, 0]; [2, 1.5, 2]]
# Интервал поиска ( -10 ... 0)
# Интервал 10
bisectionRoot2 := [
    bisection(-10, 0, 0.01);
    bisection(-10, 0, 0.001);
    bisection(-10, 0, 0.0001);
    bisection(-10, 0, 0.00001);
    bisection(-10, 0, 0.000001)
] = [10; 14; 17; 20; 24]
iterationRoot2 := [
    iteration(10, 0.01);
    iteration(10, 0.001);
    iteration(10, 0.0001);
    iteration(10, 0.00001);
    iteration(10, 0.000001)
] = [9; 10; 11; 11; 11]
# Интервал поиска (-10 ... 0)
combinationRoot2 := [
    сombination(-10, 0, 0.01);
    сombination(-10, 0, 0.001);
    сombination(-10, 0, 0.0001);
    сombination(-10, 0, 0.00001);
    сombination(-10, 0, 0.000001)
] = [2; 2; 3; 3; 3]
iterationRoot3 := [
    iteration(-0.5, 0.01);
    iteration(-0.5, 0.001);
    iteration(-0.5, 0.0001);
    iteration(-0.5, 0.00001);
    iteration(-0.5, 0.000001)
] = [3; 3; 3; 4; 4]  # Интервал -0.5
bisectionRoot3 := [
    bisection(0, 10, 0.01);
    bisection(0, 10, 0.001);
    bisection(0, 10, 0.0001);
    bisection(0, 10, 0.00001);
    bisection(0, 10, 0.000001)
] = [10; 14; 17; 20; 24]  # Интервал поиска (0 ... 10)
combinationRoot3 := [
    сombination(0, 10, 0.01);
    сombination(0, 10, 0.001);
    сombination(0, 10, 0.0001);
    сombination(0, 10, 0.00001);
    сombination(0, 10, 0.000001)
] = [6; 6; 7; 7; 7]  # Интервал поиска (0 ... 10)
iterationRoot4 := [
    iteration(0, 0.01);
    iteration(0, 0.001);
    iteration(0, 0.0001);
    iteration(0, 0.00001);
    iteration(0, 0.000001)
] = [2; 2; 3; 3; 3]  # Интервал 0
bisectionRoot4 := [
    bisection(1.5, 10, 0.01);
    bisection(1.5, 10, 0.001);
    bisection(1.5, 10, 0.0001);
    bisection(1.5, 10, 0.00001);
    bisection(1.5, 10, 0.000001)
] = [10; 14; 17; 20; 24]  # Интервал поиска (1.5 ... 10)
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combinationRoot4 := [
    сombination(1.5, 10, 0.01);
    сombination(1.5, 10, 0.001);
    сombination(1.5, 10, 0.0001);
    сombination(1.5, 10, 0.00001);
    сombination(1.5, 10, 0.000001)
] = [6; 6; 7; 7; 7]  # Интервал поиска (1.5 ... 10)
bisectionRoot5 := [
    bisection(-0.5, 0, 0.01);
    bisection(-0.5, 0, 0.001);
    bisection(-0.5, 0, 0.0001);
    bisection(-0.5, 0, 0.00001);
    bisection(-0.5, 0, 0.000001)
] = [6; 9; 13; 16; 19]  # Интервал поиска ( -0.5 ... 0)
iterationRoot5 := [
    iteration(1.5, 0.01);
    iteration(1.5, 0.001);
    iteration(1.5, 0.0001);
    iteration(1.5, 0.00001);
    iteration(1.5, 0.000001)
] = [3; 4; 4; 4; 5]  # Интервал 1.5
combinationRoot5 := [
    сombination(-0.5, 0, 0.01);
    сombination(-0.5, 0, 0.001);
    сombination(-0.5, 0, 0.0001);
    сombination(-0.5, 0, 0.00001);
    сombination(-0.5, 0, 0.000001)
] = [2; 2; 3; 3; 3]  # Интервал поиска (-0.5 ... 0)
iterationRoot6 := [
    iteration(2, 0.01);
    iteration(2, 0.001);
    iteration(2, 0.0001);
    iteration(2, 0.00001);
    iteration(2, 0.000001)
] = [3; 4; 4; 5; 5]  # Интервал 2
bisectionRoot6 := [
    bisection(1.5, 2, 0.01);
    bisection(1.5, 2, 0.001);
    bisection(1.5, 2, 0.0001);
    bisection(1.5, 2, 0.00001);
    bisection(1.5, 2, 0.000001)
] = [6; 9; 13; 16; 19]  # Интервал поиска ( 1.5 ... 2)
combinationRoot6 := [
    сombination(1.5, 2, 0.01);
    сombination(1.5, 2, 0.001);
    сombination(1.5, 2, 0.0001);
    сombination(1.5, 2, 0.00001);
    сombination(1.5, 2, 0.000001)
] = [3; 3; 3; 4; 4]  # Интервал поиска (1.5 ... 2)
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